# OpenSim document version 30512
Model Dennis:
  BodySet:
    Body pelvis: mass=30 [kg] mass_center=(0 0 0) inertia=(0.2 0.2 0.2 0 0 0)
      Brick pelvis_geom_1: socket_frame_connectee_name=../Dennis/pelvis half_lengths=(0.1 0.1 0.1)
    Body thigh: mass=10 mass_center=(0 0 0) inertia=(0.2113958 0.006125 0.2113958 0 0 0)
      PhysicalOffsetFrame patellaFrame: socket_parent_connectee_name=../Dennis/thigh translation=(0 -0.25 0)
        WrapCylinder patella: quadrant=x radius=0.08 length=0.07
      PhysicalOffsetFrame deviceAttachmentPoint: socket_parent_connectee_name=../Dennis/thigh
          translation=(0.035 0.15 0)
      Cylinder thigh_geom_1: socket_frame_connectee_name=../Dennis/thigh radius=0.035 half_height=0.25
    Body shank: mass=10 mass_center=(0 0 0) inertia=(0.2113958 0.006125 0.2113958 0 0 0)
      PointOnLineConstraint pointonlineconstraint_: socket_line_body_connectee_name=ground
          socket_follower_body_connectee_name=shank line_direction_vec=(0 1 0) point_on_line=(0 0 0)
          point_on_follower=(0 -0.25 0)
      PhysicalOffsetFrame deviceAttachmentPoint: socket_parent_connectee_name=../Dennis/shank translation=(0.035 0 0)
      Cylinder thigh_geom_1: socket_frame_connectee_name=../Dennis/shank radius=0.035 half_height=0.25
  JointSet:
    SliderJoint slider: socket_parent_frame_connectee_name=ground_offset
        socket_child_frame_connectee_name=pelvis_offset
      Coordinate yCoord: default_value=1
      PhysicalOffsetFrame ground_offset: socket_parent_connectee_name=../../Dennis/ground translation=(0 0 0)
          orientation=(0 0 1.570796)
      PhysicalOffsetFrame pelvis_offset: socket_parent_connectee_name=../../Dennis/pelvis translation=(0 0 0)
          orientation=(0 0 1.570796)
    PinJoint hip: socket_parent_frame_connectee_name=pelvis_offset socket_child_frame_connectee_name=thigh_offset
      CoordinateLimitForce hipFlexion_LimitForce: coordinate=hipFlexion upper_stiffness=20 [N*m/degree]
          upper_limit=110 [degrees] lower_stiffness=20 [N*m/degree] lower_limit=-90 [degrees] damping=5
          transition=10 [degrees] compute_dissipation_energy=false
      Coordinate hipFlexion: default_value=0.35
      PhysicalOffsetFrame pelvis_offset: socket_parent_connectee_name=../../Dennis/pelvis translation=(0 0 0)
      PhysicalOffsetFrame thigh_offset: socket_parent_connectee_name=../../Dennis/thigh translation=(0 0.25 0)
    PinJoint knee: socket_parent_frame_connectee_name=shank_offset socket_child_frame_connectee_name=thigh_offset
      CoordinateLimitForce kneeFlexion_LimitForce: coordinate=kneeFlexion upper_stiffness=50 upper_limit=140
          lower_stiffness=40 lower_limit=10 damping=2 transition=10 compute_dissipation_energy=false
      Coordinate kneeFlexion: default_value=0.75
      PhysicalOffsetFrame shank_offset: socket_parent_connectee_name=../../Dennis/shank translation=(0 0.25 0)
      PhysicalOffsetFrame thigh_offset: socket_parent_connectee_name=../../Dennis/thigh translation=(0 -0.25 0)
  ControllerSet:
    PrescribedController prescribedcontroller_: actuator_list=vastus
      FunctionSet ControlFunctions: PiecewiseConstantFunction(x=0 2 3.9, y=0.3 1 0.1)
  ForceSet:
    HuntCrossleyForce huntcrossleyforce_:
      ContactParametersSet contact_parameters:
        ContactParameters: geometry=(floor foot) stiffness=100000000 dissipation=0.5 static_friction=0.9
            dynamic_friction=0.9 viscous_friction=0.6
    Millard2012EquilibriumMuscle vastus: min_control=0 max_control=1 max_isometric_force=9000 optimal_fiber_length=0.55
        tendon_slack_length=0.2553652 pennation_angle_at_optimal=0 [radians] minimum_activation=0.01
      PathPoint origin: socket_parent_frame_connectee_name=Dennis/thigh (0.035 0.1 0)
      PathPoint insertion: socket_parent_frame_connectee_name=Dennis/shank (0.035 0.15 0)
      PathWrap pathwrap_: wrap_object=patella method=hybrid
      ActiveForceLengthCurve: minimum_value=0
      ForceVelocityCurve: concentric_slope_at_vmax=0 concentric_slope_near_vmax=0.25 isometric_slope=5
          eccentric_slope_at_vmax=0 eccentric_slope_near_vmax=0.15 max_eccentric_velocity_force_multiplier=1.4
      FiberForceLengthCurve
      TendonForceLengthCurve: strain_at_one_norm_force=0.04252901 stiffness_at_one_norm_force=29.03866
          norm_force_at_toe_end=0.5445592 curviness=0.003582445
  ContactGeometrySet:
    ContactHalfSpace floor: socket_frame_connectee_name=Dennis/ground location=(0 0 0) orientation=(0 0 -1.570796)
    ContactSphere foot: socket_frame_connectee_name=Dennis/shank location=(0 -0.25 0) radius=0.07
